folder simulations: version=27
  simulation raphanus_raphanistrum_15
    metfile met: filename=Roseworthy.met
    clock
      start_date = 01/04/2003  # Enter the start date of the simulation
      end_date = 31/12/2003  # Enter the end date of the simulation
    summaryfile: filename=Continuous Wheat Simulation.sum
    area paddock
      surfaceom surface organic matter
        PoolName = wheat  # Organic Matter pool name
        type = wheat  # Organic Matter type
        mass = 1000  # Initial surface residue (kg/ha)
        cnr = 80  # C:N ratio of initial residue
        standing_fraction = 0  # Fraction of residue standing
      fertiliser
      outputfile
        variables
          variables: dd/mm/yyyy as Date, biomass, yield, height, esw, stage, lai, leafgreenwt, stemgreenwt, leaf_no, leaf_no_dead
        events Reporting Frequency: event=daily
      soil Buckby (Roseworthy): Country=Australia; Site=Roseworthy; Region=Mid North; State=South Australia
        SoilType = Red Brown Earth  # Classification
        NearestTown = Roseworthy
        ApsoilNumber = 300
        Latitude = -34.5  # Latitude (WGS84)
        Longitude = 138.686  # Longitude (WGS84)
        LocationAccuracy = +-20m
        DataSource = Characterisation 2005 by University of Adelaide, CSIRO Sustainable Ecosystems and DWLBC. Measurement site located adjacent to site described by Soil and Land Information Group, Department of Water, Land and Biodiversity Conservation, South Australia.
        Comments = Soil naming structure: \soils\Australia\South Australia\Region\Classification (Location APSoil No). LB code: RWN3; Low-moderate clay duplex soil with moderate CEC, moderate-high bulk density.Texture change about 10cm. Slaking or dispersion likely in the l
        Water
          Layer:
            Thickness (mm)  BD (g/cc)  Airdry (mm/mm)  LL15 (mm/mm)  DUL (mm/mm)  SAT (mm/mm)
            200             1.33       0.05            0.104         0.3          0.35
            200             1.22       0.05            0.104         0.3          0.35
            200             1.33       0.09            0.115         0.3          0.35
            200             1.38       0.11            0.146         0.3          0.35
            200             1.44       0.12            0.178         0.3          0.35
            200             1.53       0.13            0.202         0.336        0.38
            200             1.47       0.14            0.257         0.358        0.41
            200             1.49       0.15            0.318         0.387        0.41
            200             1.52       0.16            0.354         0.4          0.41
          SoilCrop wheat
            Layer:
              Thickness (mm)  ll (mm/mm)  kl (/day)  xf (0-1)
              200             0.104       0.06       1
              200             0.104       0.06       1
              200             0.12        0.06       1
              200             0.16        0.06       1
              200             0.19        0.4        1
              200             0.25        0.4        1
              200             0.358       0.2        1
              200             0.387       0.2        1
              200             0.4         0.2        1
          SoilCrop raphanus_raphanistrum
            Layer:
              Thickness (mm)  ll (mm/mm)  kl (/day)  xf (0-1)
              200             0.104       0.06       1
              200             0.128       0.06       1
              200             0.18        0.06       1
              200             0.22        0.06       1
              200             0.262       0.06       1
              200             0.336       0.06       1
              200             0.358       0.04       1
              200             0.387       0.04       1
              200             0.4         0.04       1
          SoilCrop peas
            Layer:
              Thickness (mm)  ll (mm/mm)  kl (/day)  xf (0-1)
              150             0.07        0.06       1
              150             0.22        0.06       1
              300             0.22        0.06       1
              300             0.28        0.06       1
              300             0.27        0.06       0.4
              300             0.23        0.06       0.32
        SoilWat
          Layer:
            Thickness (mm)  SWCON (0-1)
            200             0.2
            200             0.2
            200             0.2
            200             0.2
            200             0.2
            200             0.2
            200             0.2
            200             0.2
            200             0.2
          SummerCona = 3.5
          SummerU = 6
          SummerDate = 1-Nov
          WinterCona = 2.5
          WinterU = 4
          WinterDate = 1-Apr
          DiffusConst = 88
          DiffusSlope = 35.4
          Salb = 0.13
          Cn2Bare = 80
          CnRed = 20
          CnCov = 0.8
        SoilOrganicMatter
          Layer:
            Thickness (mm)  OC (Walkley Black %)  FBIOM (0-1)  FINERT (0-1)
            200             1.42                  0.035        0.3
            200             0.66                  0.025        0.5
            200             0.36                  0.015        0.6
            200             0.29                  0.01         0.75
            200             0.26                  0.01         0.9
            200             0.21                  0.01         0.99
            200             0.12                  0.01         0.99
            200             0.1                   0.01         0.99
            200             0.07                  0.01         0.99
          RootCn = 20
          RootWt = 1000
          SoilCn = 24.7
          EnrACoeff = 7.4
          EnrBCoeff = 0.2
        Analysis
          Layer:
            Thickness (mm)  Rocks (%)  Texture                EC (1:5 dS/m)  PH (1:5 water)  CL (mg/kg)  CEC (cmol+/kg)  Ca (cmol+/kg)  Mg (cmol+/kg)  Na (cmol+/kg)  K (cmol+/kg)  ESP (%)  ParticleSizeSand (%)  ParticleSizeSilt (%)  ParticleSizeClay (%)
            150             0          Sandy loam             0.1            7.8             21          13.7            9.2            3.3            0.5            0.7           3.64964  73                    4                     22
            150             0          Light sandy clay loam  0.2            8.3             28          25.7            16.7           7.1            1.2            0.7           4.66926  44                    4                     52
            300             0          Medium clay            0.2            9.1             66          23.6            13.8           7.2            2              0.6           8.47458  39                    8                     53
            300             0          Medium clay            0.5            9.9             250         25              8.5            8.9            6.9            0.7           27.6     39                    8                     52
            300             0          Medium clay            0.9            9.7             510         26.1            5.7            9.6            9.8            1             37.5479  48                    7                     45
            300             0          Medium clay            1              9.5             736         24.8            3.8            9.8            10.2           1             41.129   51                    5                     43
        InitWater: RelativeTo=raphanus_raphanistrum
          PercentMethod: Percent=1; Distributed=Filled from top
        Sample Initial nitrogen
          Layer:
            Thickness  no3 (kg/ha)  nh4 (kg/ha)
            200        30           5
            1800       20           1
      folder Manager folder
        manager Harvesting rule
          # Harvesting criteria
          crop = raphanus_raphanistrum  # Enter name of crop to harvest when ripe
          on end_of_day:
```
           if [crop].StageName = 'harvest_ripe' or [crop].plant_status = 'dead' then
              [crop]  harvest
              [crop]  end_crop
           endif
```
        operations Operations Schedule
          10/06/2003  Raphanus_raphanistrum sow plants =15, sowing_depth = 30, cultivar = PacN145, row_spacing = 250, crop_class = plant
          10/06/2003  fertiliser apply amount = 123 (kg/ha), depth = 50 (mm), type = urea()
          10/06/2003  fertiliser apply amount = 19 (kg/ha), depth = 50 (mm), type = nh4_n()
      Raphanus_raphanistrum
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