folder simulations: version=29
  folder Expt324
    simulation Expt324N3
      metfile met: filename=%apsim%\Examples\MetFiles\Ingham.met
      clock
        start_date = 01/01/1990  # Enter the start date of the simulation
        end_date = 31/12/2000  # Enter the end date of the simulation
      summaryfile
      area paddock
        OilPalm
        fertiliser
        surfaceom surface organic matter
          PoolName = wheat  # Organic Matter pool name
          type = wheat  # Organic Matter type
          mass = 2000  # Initial surface residue (kg/ha)
          cnr = 80  # C:N ratio of initial residue
          standing_fraction = 0  # Fraction of residue standing
        folder Manager folder
          manager Harvesting rule
            # Harvesting criteria
            crop = OilPalm  # Enter name of crop to harvest when ripe
            on end_of_day:
```
           if day = 120 and year = 2000 then
              [crop]  harvest
              [crop]  EndCrop
           endif
```
          operations
            2/10/1998  irrigation apply amount= 40 (mm)
            26/10/1998  irrigation apply amount= 70 (mm)
            15/12/1998  irrigation apply amount= 70 (mm)
            29/12/1998  irrigation apply amount= 10 (mm)
            30/12/1998  irrigation apply amount= 55 (mm)
            7/01/1999  irrigation apply amount= 50 (mm)
            21/01/1999  irrigation apply amount= 40 (mm)
            10/02/1999  irrigation apply amount= 28 (mm)
            19/02/1999  irrigation apply amount= 15 (mm)
            9/03/1999  irrigation apply amount= 25 (mm)
            1-jan  fertiliser apply amount= 200 (kg/ha), type= urea_N (), depth= 10 (mm)
            1-jul  oilpalm RemoveLowestLeaf
          irrigation
            automatic_irrigation = on
            asw_depth = 600  # Depth to which ASW is calculated. (mm)
            crit_fr_asw = 0.5  # Fraction of ASW below which irrigation is applied (0-1.0)
            irrigation_efficiency = 1  # Efficiency of the irrigation. (0-1.0)
            irrigation_allocation = off  # Allocation limits
            allocation = 0  # Allocation in ML
            default_no3_conc = 100  # Nitrate concentration (ppm N)
            default_nh4_conc = 0  # Ammonium concentration (ppm N)
            default_cl_conc = 0  # Chloride concentration (ppm Cl)
            default_no3_conc = 100  # Nitrate concentration (ppm N)
            default_nh4_conc = 0  # Ammonium concentration (ppm N)
            default_cl_conc = 0  # Chloride concentration (ppm Cl)
          manager Tree Sowing Rule
            sowing_date = 01/01/1990
            population = 135  # Plant Population (/ha)
            cultivar = dami
            sowing_depth = 200  # Sowing depth (mm)
            on start_of_day:
```
ppsm = [population]/10000
if today = date('[sowing_date]') then
   OilPalm sow population = ppsm, depth = [sowing_depth], cultivar = [cultivar], maxcover = 1.0, budnumber = 1, row_spacing = [row_width], crop_class = plant  
endif
```
            on Init:
```
Plant_population = 0
```
        soil
          Analysis
            Layer:
              Thickness (mm)  PH (1:5 water)
              100             6.6
              200             6.2
              300             5.7
              300             5.5
              300             5.5
              300             5.5
          InitWater Initial water
            PercentMethod: Percent=1.00; Distributed=Evenly distributed
          Water
            Layer:
              Thickness (mm)  BD (g/cc)  AirDry (mm/mm)  LL15 (mm/mm)  DUL (mm/mm)  SAT (mm/mm)
              100             1.2        0.08            0.13          0.33         0.5
              200             1.2        0.13            0.13          0.33         0.5
              300             1.2        0.1             0.1           0.31         0.44
              300             1.2        0.06            0.06          0.15         0.46
              300             1.2        0.04            0.04          0.1          0.44
              300             1.2        0.02            0.02          0.06         0.44
            SoilCrop OilPalm
              Layer:
                Thickness (mm)  LL (mm/mm)  KL (/day)  XF (0-1)
                100             0.13        0.1        1
                200             0.13        0.06       1
                300             0.27        0.03       1
                300             0.27        0.03       1
                300             0.3         0.03       1
                300             0.3         0.03       1
          SoilWat: SummerCona=4.4; SummerU=9; SummerDate=1-Nov; WinterCona=4.4; WinterU=9; WinterDate=1-Apr; DiffusConst=88; DiffusSlope=35.4; Salb=0.18; CN2Bare=68; CNRed=20; CNCov=0.8
            Layer:
              Thickness (mm)  SWCON (0-1)
              100             0.55
              200             0.55
              300             0.55
              300             0.55
              300             0.55
              300             0.55
          SoilOrganicMatter: RootCN=30; RootWT=3000; SoilCN=11.5; EnrACoeff=7.4; EnrBCoeff=0.2
            Layer:
              Thickness (mm)  OC (Total %)  FBiom (0-1)  FInert (0-1)
              100             1.82          0.025        0.3
              200             1.47          0.025        0.4
              300             1.2           0.015        0.75
              300             1.03          0.01         0.9
              300             0.47          0.01         0.96
              300             0.47          0.01         0.96
          Sample Initial nitrogen
            Layer:
              Thickness (mm)  NO3 (kg/ha)  NH4 (ppm)
              100             217          0
              200             30           0
              300             5            0
              300             5            0
              300             0            0
              300             0            0
        micromet: soilalbedo=0.23; a_interception=0.0; b_interception=0.0; c_interception=0.0; d_interception=0.0
        outputfile: filename=Expt324N3.out; title=Expt324N3
          variables
            variables: dd/mm/yyyy as Date, LeafLAI, LeafLAIDead, sw_dep(), AboveGroundWt, LeafLiveWt, StemLiveWt, BunchLiveWt, RootLiveWt, RootDepth, PhenologyDaysAfterPlanting, LeafAppearedCohortNo, LeafExpandedCohortNo, LeafDeadCohortNo, LeafGreenCohortNo, LeafPhotosynthesisFwValue, LeafPhotosynthesisFnValue, LeafPhotosynthesisFvpdValue, LeafPhotosynthesisFtValue
          events Reporting Frequency: event=Daily
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